# OpenSim document version 40600
Model controlled_dynamic_walker:
  Ground
  BodySet:
    Body Platform: mass=1 [kg] inertia=(1 1 1 0 0 0) meshes=box.vtp
    Body Pelvis: mass=1 inertia=(1 1 1 0 0 0)
      Sphere Pelvis_geom_1: radius=0.2
    Body LeftThigh: mass=1 inertia=(2 2 0.02 0 0 0)
      Ellipsoid LeftThigh_geom_1: radii=(0.025 0.25 0.025)
    Body RightThigh: mass=1 inertia=(2 2 0.02 0 0 0)
      Ellipsoid RightThigh_geom_1: radii=(0.025 0.25 0.025)
    Body LeftShank: mass=0.1 inertia=(2 2 0.002 0 0 0)
      Ellipsoid LeftShank_geom_1: radii=(0.025 0.25 0.025)
    Body RightShank: mass=0.1 inertia=(2 2 0.002 0 0 0)
      Ellipsoid RightShank_geom_1: radii=(0.025 0.25 0.025)
    Body leftFoot: mass=0.0002 inertia=(2 2 0.0002 0 0 0)
    Body RightFoot: mass=0.0002 inertia=(2 2 0.0002 0 0 0)
  JointSet:
    WeldJoint PlatformToGround: socket_parent_frame=ground_offset socket_child_frame=Platform_offset
      PhysicalOffsetFrame ground_offset: socket_parent=/ground translation=(0 0 0) [meters]
          orientation=(0 0 -0.02617994) [radians]
      PhysicalOffsetFrame Platform_offset: socket_parent=/bodyset/Platform translation=(0 0 0)
    PlanarJoint PelvisToPlatform: socket_parent_frame=/bodyset/Platform socket_child_frame=/bodyset/Pelvis
      Coordinate Pelvis_rz: default_value=0 range=(0 0)
      Coordinate Pelvis_tx: default_value=0.2 default_speed_value=1.5 range=(0 10)
      Coordinate Pelvis_ty: default_value=0.96 default_speed_value=-2 range=(0 5)
    PinJoint LThighToPelvis: socket_parent_frame=Pelvis_offset socket_child_frame=LeftThigh_offset
      Coordinate LHip_rz: default_value=0.3125117 default_speed_value=-0.2454075 range=(-1.745329 1.745329)
      PhysicalOffsetFrame Pelvis_offset: socket_parent=/bodyset/Pelvis translation=(0 0 -0.2)
      PhysicalOffsetFrame LeftThigh_offset: socket_parent=/bodyset/LeftThigh translation=(0 0.25 0)
    PinJoint RThighToPelvis: socket_parent_frame=Pelvis_offset socket_child_frame=RightThigh_offset
      Coordinate RHip_rz: default_value=-0.15 default_speed_value=-0.6 range=(-1.745329 1.745329)
      PhysicalOffsetFrame Pelvis_offset: socket_parent=/bodyset/Pelvis translation=(0 0 0.2)
      PhysicalOffsetFrame RightThigh_offset: socket_parent=/bodyset/RightThigh translation=(0 0.25 0)
    PinJoint LShankToLThigh: socket_parent_frame=LeftThigh_offset socket_child_frame=LeftShank_offset
      Coordinate LKnee_rz: default_value=0.03 default_speed_value=-0.5 range=(-1.745329 0)
      PhysicalOffsetFrame LeftThigh_offset: socket_parent=/bodyset/LeftThigh translation=(0 -0.25 0)
      PhysicalOffsetFrame LeftShank_offset: socket_parent=/bodyset/LeftShank translation=(0 0.25 0)
    PinJoint RShankToRThigh: socket_parent_frame=RightThigh_offset socket_child_frame=RightShank_offset
      Coordinate RKnee_rz: default_value=0.05 default_speed_value=0.02 range=(-1.745329 0)
      PhysicalOffsetFrame RightThigh_offset: socket_parent=/bodyset/RightThigh translation=(0 -0.25 0)
      PhysicalOffsetFrame RightShank_offset: socket_parent=/bodyset/RightShank translation=(0 0.25 0)
    WeldJoint LeftShankToFoot: socket_parent_frame=LeftShank_offset socket_child_frame=leftFoot_offset
      PhysicalOffsetFrame LeftShank_offset: socket_parent=/bodyset/LeftShank translation=(0.05 -0.2 0)
      PhysicalOffsetFrame leftFoot_offset: socket_parent=/bodyset/leftFoot translation=(0 0 0)
    WeldJoint RightShankToFoot: socket_parent_frame=RightShank_offset socket_child_frame=RightFoot_offset
      PhysicalOffsetFrame RightShank_offset: socket_parent=/bodyset/RightShank translation=(0.05 -0.2 0)
      PhysicalOffsetFrame RightFoot_offset: socket_parent=/bodyset/RightFoot translation=(0 0 0)
  ControllerSet:
    PrescribedController exo_controller: socket_actuators=(/forceset/exo_LHip_rz /forceset/exo_LKnee_rz /forceset/exo_RHip_rz /forceset/exo_RKnee_rz)
      FunctionSet ControlFunctions: Constant(value=0) Constant(value=2.53033) Constant(value=-0.04858453)
          Constant(value=1.584466)
  ForceSet:
    HuntCrossleyForce LFootForce: transition_velocity=0.1
      ContactParametersSet contact_parameters:
        ContactParameters: geometry=(LFootContact PlatformContact) stiffness=1000000 dissipation=2 static_friction=0.8
            dynamic_friction=0.4 viscous_friction=0.4
    HuntCrossleyForce RFootForce: transition_velocity=0.1
      ContactParametersSet contact_parameters:
        ContactParameters: geometry=(RFootContact PlatformContact) stiffness=1000000 dissipation=2 static_friction=0.8
            dynamic_friction=0.4 viscous_friction=0.4
    HuntCrossleyForce LKneeForce: transition_velocity=0.2
      ContactParametersSet contact_parameters:
        ContactParameters: geometry=(LKneeContact PlatformContact) stiffness=1000000 dissipation=2 static_friction=0.8
            dynamic_friction=0.4 viscous_friction=0.4
    HuntCrossleyForce RKneeForce: transition_velocity=0.2
      ContactParametersSet contact_parameters:
        ContactParameters: geometry=(RKneeContact PlatformContact) stiffness=1000000 dissipation=2 static_friction=0.8
            dynamic_friction=0.4 viscous_friction=0.4
    HuntCrossleyForce LHipForce: transition_velocity=0.2
      ContactParametersSet contact_parameters:
        ContactParameters: geometry=(LHipContact PlatformContact) stiffness=1000000 dissipation=2 static_friction=0.8
            dynamic_friction=0.4 viscous_friction=0.4
    HuntCrossleyForce RHipForce: transition_velocity=0.2
      ContactParametersSet contact_parameters:
        ContactParameters: geometry=(RHipContact PlatformContact) stiffness=1000000 dissipation=2 static_friction=0.8
            dynamic_friction=0.4 viscous_friction=0.4
    CoordinateLimitForce LKneeLimitTorque: coordinate=LKnee_rz upper_stiffness=0.5 [N*m/degree] upper_limit=0 [degrees]
        lower_stiffness=0.5 [N*m/degree] lower_limit=-140 [degrees] damping=0.025 transition=5 [degrees]
    CoordinateLimitForce RKneeLimitTorque: coordinate=RKnee_rz upper_stiffness=0.5 upper_limit=0 lower_stiffness=0.5
        lower_limit=-140 damping=0.025 transition=5
    CoordinateLimitForce LHipLimitTorque: coordinate=LHip_rz upper_stiffness=0.5 upper_limit=100 lower_stiffness=0.5
        lower_limit=-100 damping=0.025 transition=5
    CoordinateLimitForce RHipLimitTorque: coordinate=RHip_rz upper_stiffness=0.5 upper_limit=100 lower_stiffness=0.5
        lower_limit=-100 damping=0.025 transition=5
    CoordinateActuator exo_LHip_rz: min_control=-10 max_control=10 coordinate=LHip_rz optimal_force=1
    CoordinateActuator exo_LKnee_rz: min_control=-10 max_control=10 coordinate=LKnee_rz optimal_force=1
    CoordinateActuator exo_RHip_rz: min_control=-10 max_control=10 coordinate=RHip_rz optimal_force=1
    CoordinateActuator exo_RKnee_rz: min_control=-10 max_control=10 coordinate=RKnee_rz optimal_force=1
  ContactGeometrySet:
    ContactHalfSpace PlatformContact: socket_frame=/bodyset/Platform location=(0 0.025 0) orientation=(0 0 -1.570796)
    ContactSphere LFootContact: socket_frame=/bodyset/leftFoot location=(0 0.05 0) radius=0.1
    ContactSphere RFootContact: socket_frame=/bodyset/RightFoot location=(0 0.05 0) radius=0.1
    ContactSphere LKneeContact: socket_frame=/bodyset/LeftShank location=(0 0.25 0) radius=0.05
    ContactSphere RKneeContact: socket_frame=/bodyset/RightShank location=(0 0.25 0) radius=0.05
    ContactSphere LHipContact: socket_frame=/bodyset/Pelvis location=(0 0 -0.2) radius=0.05
    ContactSphere RHipContact: socket_frame=/bodyset/Pelvis location=(0 0 0.2) radius=0.05
